# Fe3O4 -- [0, 1, 0][1, 0, 0] grain boundary
# atom types: 1 -- Fe, 2 -- O
# units real: mass = g/mole; dist = Angstroms; time = fs;
# energy = Kcal/mole = 4184 J/mole

units 		real
dimension	3
atom_style	charge
neigh_modify	delay 5
neighbor	0.3 bin

#---------------------Geometry of the model------------------

variable a equal 6.1602
variable b equal 6.1877
variable c equal 6.1868

region box block 0 $(3*v_c) 0 42.4 0 40 units box
boundary	p p s
create_box 2 box

read_data	coolannealedboundary.data	add append

region boundary block -1000 1000 -1000 1000 17 23
group boundary region boundary

#---------------Define potential and run minimization

pair_style	reax/c	NULL
pair_coeff	* *	ffield.reax.Fe_O_C_H Fe O
fix             2 all qeq/reax 1 0.0 10.0 1e-6 reax/c

compute	  	T all temp
fix 		1 all nve
timestep 	1.0
thermo		10
thermo_style 	custom step pe c_T
#dump		1 boundary custom 10 dumpboundary1500 id type x y z

velocity	all create 1300 239239239
fix 		3 all temp/rescale 10 1500 1500 1 1.0

write_data initial1500.10

run 10000

write_data final1500.10
